X := transpose(READPRN("C:\Users\schoolboychik\Desktop\sco\mathstat\lab1\matrix.txt"))
len := rows(X)
len = 120
X_sorted := sort(X)
M_min := min(X)
M_min = -19.47
M_max := max(X)
M_max = -15.27
X = [
    -17.04; -18.29; -17.38; -18.11; -18.96; -17.65; -17.02; -17.22; -16.25; -17.44
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]
R := M_max - M_min
R = 4.2
μ := mean(X)
μ = -17.5894
S := Stdev(X)
S^2 = 0.728611
m := ceil(log(rows(X), 2)) + 2
m = 9
h := R/m
i := 0 .. 9
int[i] := M_min + h*i
int = [-19.47; -19.0033; -18.5367; -18.07; -17.6033; -17.1367; -16.67; -16.2033; -15.7367; -15.27]
f(x) := 1/(S*sqrt(2*π))*e^(-(x - μ)^2/(2*S^2))
# [plot: 1/(len*h)*histogram(m, X)[:, 1], f(X_sorted) vs histogram(m, X)[:, 0], X_sorted]
x := M_min - 0.1, M_min .. M_max
j := 0
s := 0
F(x) :=
    if x < M_min
        0
    else
        if x ≤ M_max
            while X_sorted[j] < x
                s ← s + X_sorted[j]
                j ← j + 1
            s/sum(X)
        else
            1
# [plot: F(x), f(X_sorted) vs x, X_sorted]
